# OpenSim document version 40000
MarkerSet:
  Marker RFHD: head_neck (0.115704 0.228311 0.0679004)
  Marker LFHD: head_neck (0.0947306 0.231838 -0.0672647)
  Marker RBHD: head_neck (-0.0244163 0.192386 0.0759178)
  Marker LBHD: head_neck (-0.0214031 0.186597 -0.080875)
  Marker STRN: sternum (0.0277251 -0.0205045 -0.0346287)
  Marker RCLAV: clavicle_R (0.0215 0 0.014)
  Marker LCLAV: clavicle_L (0.0215 0 -0.014)
  Marker RSHO: scapula_R (0.004 0.043 0.008)
  Marker LSHO: scapula_L (0.004 0.043 -0.008)
  Marker RUA1: humerus_R (-0.0322014 -0.0643196 0.0247955)
  Marker RUA2: humerus_R (0.0158356 -0.0986579 0.0219408)
  Marker RUA3: humerus_R (0.000966109 -0.145526 0.0205239)
  Marker RUA4: humerus_R (-0.0394207 -0.12063 0.0182317)
  Marker LUA1: humerus_L (0.0247007 -0.0743624 -0.0340364)
  Marker LUA2: humerus_L (-0.0253557 -0.0935381 -0.0322331)
  Marker LUA3: humerus_L (-0.0205482 -0.145107 -0.0253549)
  Marker LUA4: humerus_L (0.0340506 -0.131953 -0.0235933)
  Marker RELB: humerus_R (0 -0.25 0.031) fixed=true
  Marker LELB: humerus_L (0 -0.25 -0.031) fixed=true
  Marker RLA1: radius_R (-0.0255565 -0.0777826 0.0285647)
  Marker RLA2: radius_R (0.0172732 -0.0906998 0.0357459)
  Marker RLA3: ulna_R (0.00599166 -0.158343 0.0687801)
  Marker RLA4: ulna_R (-0.0335996 -0.137478 0.0680409)
  Marker LLA1: ulna_L (0.0270147 -0.0946154 -0.0422273)
  Marker LLA2: ulna_L (-0.00661693 -0.132362 -0.048043)
  Marker LLA3: radius_L (0.0154483 -0.158607 -0.035953)
  Marker LLA4: radius_L (0.0508308 -0.126195 -0.0393113)
  Marker RWRI: radius_R (0.055 -0.2 0.02) fixed=true
  Marker LWRI: radius_L (0.055 -0.2 -0.02) fixed=true
  Marker C7: head_neck (-0.0564192 0.0215462 0.00178613)
  Marker T11: thoracic1 (-0.0625165 -0.00639919 0.0106111)
  Marker T12: thoracic1 (-0.0622629 -0.0229546 0.00887418)
  Marker T13: thoracic1 (-0.0629424 -0.0229271 -0.00831307)
  Marker T14: thoracic1 (-0.0656519 -0.00703949 -0.00903262)
  Marker T2: thoracic2 (-0.0625 -0.025 0)
  Marker T3: thoracic3 (-0.0625 -0.024 0)
  Marker T4: thoracic4 (-0.0625 -0.023 0)
  Marker T5: thoracic5 (-0.0625 -0.018 0)
  Marker T6: thoracic6 (-0.0625 -0.016 0)
  Marker T7: thoracic7 (-0.0625 -0.015 0)
  Marker T8: thoracic8 (-0.0625 -0.013 0)
  Marker T9: thoracic9 (-0.0625 -0.012 0)
  Marker T10: thoracic10 (-0.0625 -0.01 0)
  Marker T111: thoracic11 (-0.0625 -0.01 0)
  Marker T121: thoracic12 (-0.0625 0 0)
  Marker L2: lumbar2 (-0.0625 0.005 0)
  Marker L3: lumbar3 (-0.0625 0.005 0)
  Marker L4: lumbar4 (-0.0625 -0.003 0)
  Marker L5: lumbar5 (-0.0625 -0.01 0)
  Marker L11: lumbar1 (-0.0789816 0.021211 0.00732252)
  Marker L12: lumbar1 (-0.080509 0.00535799 0.00549664)
  Marker L13: lumbar1 (-0.0800531 0.0055545 -0.0122111)
  Marker L14: lumbar1 (-0.0787896 0.0216623 -0.0128377)
  Marker S21: sacrum (-0.186438 0.055326 0.00926899)
  Marker S22: sacrum (-0.197427 0.0363355 0.0119604)
  Marker S23: sacrum (-0.197691 0.0356477 -0.0079227)
  Marker S24: sacrum (-0.191755 0.0542257 -0.0107688)
  Marker RTH1: femur_r (0.00174784 -0.143335 0.0832125)
  Marker RTH2: femur_r (0.0386407 -0.170648 0.0755101)
  Marker RTH3: femur_r (0.00868805 -0.214284 0.0766168)
  Marker RTH4: femur_r (-0.0129399 -0.182747 0.0804471)
  Marker RLK: femur_r (0.001 -0.36 0.05) fixed=true
  Marker RTB1: tibia_r (0.00187576 -0.161031 0.0784782)
  Marker RTB2: tibia_r (0.0242276 -0.194353 0.0787801)
  Marker RTB3: tibia_r (0.00799345 -0.237098 0.0772717)
  Marker RTB4: tibia_r (-0.0169182 -0.205069 0.079152)
  Marker RMK: femur_r (0.001 -0.36 -0.05)
  Marker LTH1: femur_l (0.00237518 -0.1435 -0.0806767)
  Marker LTH2: femur_l (-0.0100592 -0.185971 -0.0756739)
  Marker LTH3: femur_l (0.0165188 -0.220912 -0.0707031)
  Marker LTH4: femur_l (0.0379407 -0.171266 -0.0753923)
  Marker LLK: femur_l (0.001 -0.36 -0.05) fixed=true
  Marker LMK: femur_l (0.001 -0.36 0.05)
  Marker LTB1: tibia_l (-0.00745851 -0.167832 -0.0799638)
  Marker LTB2: tibia_l (-0.0206427 -0.207854 -0.0792534)
  Marker LTB3: tibia_l (-0.00450093 -0.240422 -0.0732618)
  Marker LTB4: tibia_l (0.0213641 -0.203341 -0.076175)
  Marker LLA: talus_l (0 0.02 -0.06) fixed=true
  Marker LMA: talus_l (0 0.038 0.045) fixed=true
  Marker LTOE: toes_l (0.005 0.023 0.012)
  Marker RASIS: pelvis (-0.01 -0.011 0.125)
  Marker RILIC: pelvis (-0.05 0.064 0.125)
  Marker RPSIS: pelvis (-0.19 0.005 0.055)
  Marker LPSIS: pelvis (-0.19 0.005 -0.055)
  Marker RLA: talus_r (0 0.02 0.06) fixed=true
  Marker RMA: talus_r (0 0.038 -0.045) fixed=true
  Marker RTOE: toes_r (0.005 0.023 -0.012)
  Marker RSDF: toes_r (-0.06 0.03 0.03)
  Marker RTPF: talus_r (0.08 0.012 0)
  Marker RANK: talus_r (-0.065 -0.015 0)
  Marker LTPF: talus_l (0.08 0.012 0)
  Marker LSDF: toes_l (-0.06 0.03 -0.03)
  Marker LANK: talus_l (-0.065 -0.015 0)
  Marker LASIS: pelvis (-0.01 -0.011 -0.125)
  Marker LILIC: pelvis (-0.05 0.064 -0.125)
  Marker RTRO: femur_r (-0.01 0 0.08)
  Marker LTRO: femur_l (-0.01 0 -0.08)
  Marker PELVIS: pelvis (-0.095 -0.003 0) fixed=true
  Marker HEAD: head_neck (0.04115 0.175 -0.0011)
  Marker RKNEE: femur_r (0.001 -0.36 0) fixed=true
  Marker LKNEE: femur_l (0.001 -0.36 0) fixed=true
  Marker CASIS: pelvis (-0.01 -0.011 0)
  Marker CPSIS: pelvis (-0.19 0.005 0)
  Marker RANKLE: talus_r (0 0.029 0.0075) fixed=true
  Marker LANKLE: talus_l (0 0.029 -0.0075) fixed=true
  Marker RHJC: femur_r (0 0 0) fixed=true
  Marker LHJC: femur_l (0 0 0) fixed=true
  Marker MHJC: pelvis (-0.0707 -0.0661 0) fixed=true
  Marker L5S1: lumbar5 (0 0 0) fixed=true
