# OpenSim document version 40000
ScaleTool ScaleModel:
  mass: -1 [kg]
  height: -1
  age: -1
  ModelScaler:
    apply: true
    scaling_order: measurements
    time_range: 0 1
    preserve_mass_distribution: true
    MeasurementSet:
      Measurement pelvis: apply=true
        MarkerPair: markers=(LHJC RHJC)
        BodyScale pelvis: axes=(X Y Z)
        BodyScale sacrum: axes=(X Y Z)
      Measurement lower legs: apply=true
        MarkerPair: markers=(LLK LLA)
        MarkerPair: markers=(RLK RLA)
        BodyScale tibia_r: axes=(X Y Z)
        BodyScale tibia_l: axes=(X Y Z)
      Measurement upper legs: apply=true
        MarkerPair: markers=(LHJC LLK)
        MarkerPair: markers=(RHJC RLK)
        BodyScale femur_r: axes=(X Y Z)
        BodyScale femur_l: axes=(X Y Z)
      Measurement upper arms: apply=true
        MarkerPair: markers=(LELB LSHO)
        MarkerPair: markers=(RELB RSHO)
        BodyScale humerus_R: axes=(X Y Z)
        BodyScale humerus_L: axes=(X Y Z)
      Measurement lower arms: apply=true
        MarkerPair: markers=(LELB LWRI)
        MarkerPair: markers=(RELB RWRI)
        BodyScale ulna_R: axes=(X Y Z)
        BodyScale radius_R: axes=(X Y Z)
        BodyScale ulna_L: axes=(X Y Z)
        BodyScale radius_L: axes=(X Y Z)
      Measurement head_neck_XZScale: apply=true
        MarkerPair: markers=(RFHD LBHD)
        MarkerPair: markers=(LFHD RBHD)
        BodyScale head_neck: axes=(X Z)
      Measurement head_neck_YScale: apply=true
        MarkerPair: markers=(HEAD C7)
        MarkerPair: markers=(HEAD STRN)
        BodyScale head_neck: axes=Y
      Measurement foot_length_scale: apply=true
        MarkerPair: markers=(RANK RTOE)
        MarkerPair: markers=(LANK LTOE)
        BodyScale calcn_r: axes=(X Z)
        BodyScale toes_r: axes=(X Z)
        BodyScale calcn_l: axes=(X Z)
        BodyScale toes_l: axes=(X Z)
      Measurement trunk: apply=true
        MarkerPair: markers=(C7 L5S1)
        MarkerPair: markers=(C7 STRN)
        MarkerPair: markers=(RSHO LSHO)
        BodyScale Abdomen: axes=(X Z)
        BodyScale lumbar5: axes=(X Z)
        BodyScale lumbar4: axes=(X Z)
        BodyScale lumbar3: axes=(X Z)
        BodyScale lumbar2: axes=(X Z)
        BodyScale lumbar1: axes=(X Z)
        BodyScale thoracic12: axes=(X Z)
        BodyScale thoracic11: axes=(X Z)
        BodyScale thoracic10: axes=(X Z)
        BodyScale thoracic9: axes=(X Z)
        BodyScale thoracic8: axes=(X Z)
        BodyScale thoracic7: axes=(X Z)
        BodyScale thoracic6: axes=(X Z)
        BodyScale thoracic5: axes=(X Z)
        BodyScale thoracic4: axes=(X Z)
        BodyScale thoracic3: axes=(X Z)
        BodyScale thoracic2: axes=(X Z)
        BodyScale thoracic1: axes=(X Z)
        BodyScale rib12_R: axes=(X Y Z)
        BodyScale rib11_R: axes=(X Y Z)
        BodyScale rib10_R: axes=(X Y Z)
        BodyScale rib9_R: axes=(X Y Z)
        BodyScale rib8_R: axes=(X Y Z)
        BodyScale rib7_R: axes=(X Y Z)
        BodyScale rib6_R: axes=(X Y Z)
        BodyScale rib5_R: axes=(X Y Z)
        BodyScale rib4_R: axes=(X Y Z)
        BodyScale rib3_R: axes=(X Y Z)
        BodyScale rib2_R: axes=(X Y Z)
        BodyScale rib1_R: axes=(X Y Z)
        BodyScale rib12_L: axes=(X Y Z)
        BodyScale rib11_L: axes=(X Y Z)
        BodyScale rib10_L: axes=(X Y Z)
        BodyScale rib9_L: axes=(X Y Z)
        BodyScale rib8_L: axes=(X Y Z)
        BodyScale rib7_L: axes=(X Y Z)
        BodyScale rib6_L: axes=(X Y Z)
        BodyScale rib5_L: axes=(X Y Z)
        BodyScale rib4_L: axes=(X Y Z)
        BodyScale rib3_L: axes=(X Y Z)
        BodyScale rib2_L: axes=(X Y Z)
        BodyScale rib1_L: axes=(X Y Z)
        BodyScale sternum: axes=(X Y Z)
        BodyScale clavicle_R: axes=(X Y Z)
        BodyScale scapula_R: axes=(X Y Z)
        BodyScale clavicle_L: axes=(X Y Z)
        BodyScale scapula_L: axes=(X Y Z)
        BodyScale Abd_L_L1: axes=(X Y Z)
        BodyScale Abd_L_L2: axes=(X Y Z)
        BodyScale Abd_L_L3: axes=(X Y Z)
        BodyScale Abd_L_L4: axes=(X Y Z)
        BodyScale Abd_L_L5: axes=(X Y Z)
        BodyScale Abd_R_L1: axes=(X Y Z)
        BodyScale Abd_R_L2: axes=(X Y Z)
        BodyScale Abd_R_L3: axes=(X Y Z)
        BodyScale Abd_R_L4: axes=(X Y Z)
        BodyScale Abd_R_L5: axes=(X Y Z)
      Measurement spine_length: apply=true
        MarkerPair: markers=(C7 RHJC)
        MarkerPair: markers=(C7 LHJC)
        BodyScale Abdomen: axes=Y
        BodyScale lumbar5: axes=Y
        BodyScale lumbar4: axes=Y
        BodyScale lumbar3: axes=Y
        BodyScale lumbar2: axes=Y
        BodyScale lumbar1: axes=Y
        BodyScale thoracic12: axes=Y
        BodyScale thoracic11: axes=Y
        BodyScale thoracic10: axes=Y
        BodyScale thoracic9: axes=Y
        BodyScale thoracic8: axes=Y
        BodyScale thoracic7: axes=Y
        BodyScale thoracic6: axes=Y
        BodyScale thoracic5: axes=Y
        BodyScale thoracic4: axes=Y
        BodyScale thoracic3: axes=Y
        BodyScale thoracic2: axes=Y
        BodyScale thoracic1: axes=Y
      Measurement Height: apply=true
        MarkerPair: markers=(HEAD RANKLE)
        MarkerPair: markers=(HEAD LANKLE)
        BodyScale hand_R: axes=(X Y Z)
        BodyScale hand_L: axes=(X Y Z)
        BodyScale talus_r: axes=(X Y Z)
        BodyScale talus_l: axes=(X Y Z)
  MarkerPlacer:
    apply: true
    time_range: 0 1
    max_marker_movement: -1
    IKTaskSet:
      IKMarkerTask RFHD: apply=false weight=1
      IKMarkerTask LFHD: apply=false weight=1
      IKMarkerTask RBHD: apply=false weight=1
      IKMarkerTask LBHD: apply=false weight=1
      IKMarkerTask STRN: apply=true weight=100
      IKMarkerTask RCLAV: apply=true weight=1
      IKMarkerTask LCLAV: apply=true weight=1
      IKMarkerTask RSHO: apply=true weight=10
      IKMarkerTask LSHO: apply=true weight=10
      IKMarkerTask RUA1: apply=false weight=1
      IKMarkerTask RUA2: apply=false weight=1
      IKMarkerTask RUA3: apply=false weight=1
      IKMarkerTask RUA4: apply=false weight=1
      IKMarkerTask LUA1: apply=false weight=1
      IKMarkerTask LUA2: apply=false weight=1
      IKMarkerTask LUA3: apply=false weight=1
      IKMarkerTask LUA4: apply=false weight=1
      IKMarkerTask RELB: apply=true weight=100
      IKMarkerTask LELB: apply=true weight=100
      IKMarkerTask RLA1: apply=false weight=1
      IKMarkerTask RLA2: apply=false weight=1
      IKMarkerTask RLA3: apply=false weight=1
      IKMarkerTask RLA4: apply=false weight=1
      IKMarkerTask LLA1: apply=false weight=1
      IKMarkerTask LLA2: apply=false weight=1
      IKMarkerTask LLA3: apply=false weight=1
      IKMarkerTask LLA4: apply=false weight=1
      IKMarkerTask RWRI: apply=true weight=10
      IKMarkerTask LWRI: apply=true weight=10
      IKMarkerTask C7: apply=true weight=100
      IKMarkerTask T11: apply=true weight=2
      IKMarkerTask T12: apply=true weight=2
      IKMarkerTask T13: apply=true weight=2
      IKMarkerTask T14: apply=true weight=2
      IKMarkerTask T2: apply=true weight=2
      IKMarkerTask T3: apply=true weight=2
      IKMarkerTask T4: apply=true weight=2
      IKMarkerTask T5: apply=true weight=2
      IKMarkerTask T6: apply=true weight=2
      IKMarkerTask T7: apply=true weight=2
      IKMarkerTask T8: apply=true weight=2
      IKMarkerTask T9: apply=true weight=2
      IKMarkerTask T10: apply=true weight=2
      IKMarkerTask T111: apply=true weight=2
      IKMarkerTask T121: apply=true weight=2
      IKMarkerTask L2: apply=true weight=2
      IKMarkerTask L3: apply=true weight=2
      IKMarkerTask L4: apply=true weight=2
      IKMarkerTask L5: apply=true weight=2
      IKMarkerTask L11: apply=true weight=2
      IKMarkerTask L12: apply=true weight=2
      IKMarkerTask L13: apply=true weight=2
      IKMarkerTask L14: apply=true weight=2
      IKMarkerTask S21: apply=true weight=2
      IKMarkerTask S22: apply=true weight=2
      IKMarkerTask S23: apply=true weight=2
      IKMarkerTask S24: apply=true weight=2
      IKMarkerTask RTH1: apply=false weight=1
      IKMarkerTask RTH2: apply=false weight=1
      IKMarkerTask RTH3: apply=false weight=1
      IKMarkerTask RTH4: apply=false weight=1
      IKMarkerTask RLK: apply=true weight=10
      IKMarkerTask RTB1: apply=false weight=1
      IKMarkerTask RTB2: apply=false weight=1
      IKMarkerTask RTB3: apply=false weight=1
      IKMarkerTask RTB4: apply=false weight=1
      IKMarkerTask RMK: apply=true weight=10
      IKMarkerTask LTH1: apply=false weight=1
      IKMarkerTask LTH2: apply=false weight=1
      IKMarkerTask LTH3: apply=false weight=1
      IKMarkerTask LTH4: apply=false weight=1
      IKMarkerTask LLK: apply=true weight=10
      IKMarkerTask LMK: apply=true weight=10
      IKMarkerTask LTB1: apply=false weight=1
      IKMarkerTask LTB2: apply=false weight=1
      IKMarkerTask LTB3: apply=false weight=1
      IKMarkerTask LTB4: apply=false weight=1
      IKMarkerTask LLA: apply=true weight=10
      IKMarkerTask LMA: apply=true weight=10
      IKMarkerTask LTOE: apply=true weight=10
      IKMarkerTask RASIS: apply=true weight=10
      IKMarkerTask RPSIS: apply=true weight=10
      IKMarkerTask LPSIS: apply=true weight=10
      IKMarkerTask RLA: apply=true weight=10
      IKMarkerTask RMA: apply=true weight=10
      IKMarkerTask RTOE: apply=true weight=10
      IKMarkerTask RSDF: apply=true weight=1
      IKMarkerTask RANK: apply=true weight=10
      IKMarkerTask LSDF: apply=true weight=1
      IKMarkerTask LANK: apply=true weight=10
      IKMarkerTask LASIS: apply=true weight=10
      IKMarkerTask RTRO: apply=true weight=10
      IKMarkerTask LTRO: apply=true weight=10
      IKMarkerTask PELVIS: apply=true weight=10
      IKMarkerTask HEAD: apply=true weight=100
      IKMarkerTask RKNEE: apply=true weight=10
      IKMarkerTask LKNEE: apply=true weight=10
      IKMarkerTask RANKLE: apply=true weight=10
      IKMarkerTask LANKLE: apply=true weight=10
      IKMarkerTask RHJC: apply=true weight=100
      IKMarkerTask LHJC: apply=true weight=100
      IKMarkerTask L5S1: apply=true weight=100
