# OpenSim document version 40000
ForceSet:
  CoordinateActuator pelvis_rotation: coordinate=pelvis_rotation optimal_force=100
  CoordinateActuator pelvis_tilt: coordinate=pelvis_tilt optimal_force=100
  CoordinateActuator pelvis_list: coordinate=pelvis_list optimal_force=10
  CoordinateActuator pelvis_tx: coordinate=pelvis_tx optimal_force=10
  CoordinateActuator pelvis_ty: coordinate=pelvis_ty optimal_force=25
  CoordinateActuator pelvis_tz: coordinate=pelvis_tz optimal_force=10
  CoordinateActuator Abs_FE: coordinate=Abs_FE optimal_force=1
  CoordinateActuator Abs_LB: coordinate=Abs_LB optimal_force=1
  CoordinateActuator Abs_AR: coordinate=Abs_AR optimal_force=1
  CoordinateActuator L5_S1_FE: coordinate=L5_S1_FE optimal_force=1
  CoordinateActuator L5_S1_LB: coordinate=L5_S1_LB optimal_force=1
  CoordinateActuator L5_S1_AR: coordinate=L5_S1_AR optimal_force=1
  CoordinateActuator L4_L5_FE: coordinate=L4_L5_FE optimal_force=1
  CoordinateActuator L4_L5_LB: coordinate=L4_L5_LB optimal_force=1
  CoordinateActuator L4_L5_AR: coordinate=L4_L5_AR optimal_force=1
  CoordinateActuator L3_L4_FE: coordinate=L3_L4_FE optimal_force=1
  CoordinateActuator L3_L4_LB: coordinate=L3_L4_LB optimal_force=1
  CoordinateActuator L3_L4_AR: coordinate=L3_L4_AR optimal_force=1
  CoordinateActuator L2_L3_FE: coordinate=L2_L3_FE optimal_force=1
  CoordinateActuator L2_L3_LB: coordinate=L2_L3_LB optimal_force=1
  CoordinateActuator L2_L3_AR: coordinate=L2_L3_AR optimal_force=1
  CoordinateActuator L1_L2_FE: coordinate=L1_L2_FE optimal_force=1
  CoordinateActuator L1_L2_LB: coordinate=L1_L2_LB optimal_force=1
  CoordinateActuator L1_L2_AR: coordinate=L1_L2_AR optimal_force=1
  CoordinateActuator T12_L1_FE: coordinate=T12_L1_FE optimal_force=1
  CoordinateActuator T12_L1_LB: coordinate=T12_L1_LB optimal_force=1
  CoordinateActuator T12_L1_AR: coordinate=T12_L1_AR optimal_force=1
  CoordinateActuator T11_T12_FE: coordinate=T11_T12_FE optimal_force=1
  CoordinateActuator T11_T12_LB: coordinate=T11_T12_LB optimal_force=1
  CoordinateActuator T11_T12_AR: coordinate=T11_T12_AR optimal_force=1
  CoordinateActuator T10_T11_FE: coordinate=T10_T11_FE optimal_force=1
  CoordinateActuator T10_T11_LB: coordinate=T10_T11_LB optimal_force=1
  CoordinateActuator T10_T11_AR: coordinate=T10_T11_AR optimal_force=1
  CoordinateActuator T9_T10_FE: coordinate=T9_T10_FE optimal_force=1
  CoordinateActuator T9_T10_LB: coordinate=T9_T10_LB optimal_force=1
  CoordinateActuator T9_T10_AR: coordinate=T9_T10_AR optimal_force=1
  CoordinateActuator T8_T9_FE: coordinate=T8_T9_FE optimal_force=1
  CoordinateActuator T8_T9_LB: coordinate=T8_T9_LB optimal_force=1
  CoordinateActuator T8_T9_AR: coordinate=T8_T9_AR optimal_force=1
  CoordinateActuator T7_T8_FE: coordinate=T7_T8_FE optimal_force=1
  CoordinateActuator T7_T8_LB: coordinate=T7_T8_LB optimal_force=1
  CoordinateActuator T7_T8_AR: coordinate=T7_T8_AR optimal_force=1
  CoordinateActuator T6_T7_FE: coordinate=T6_T7_FE optimal_force=1
  CoordinateActuator T6_T7_LB: coordinate=T6_T7_LB optimal_force=1
  CoordinateActuator T6_T7_AR: coordinate=T6_T7_AR optimal_force=1
  CoordinateActuator T5_T6_FE: coordinate=T5_T6_FE optimal_force=1
  CoordinateActuator T5_T6_LB: coordinate=T5_T6_LB optimal_force=1
  CoordinateActuator T5_T6_AR: coordinate=T5_T6_AR optimal_force=1
  CoordinateActuator T4_T5_FE: coordinate=T4_T5_FE optimal_force=1
  CoordinateActuator T4_T5_LB: coordinate=T4_T5_LB optimal_force=1
  CoordinateActuator T4_T5_AR: coordinate=T4_T5_AR optimal_force=1
  CoordinateActuator T3_T4_FE: coordinate=T3_T4_FE optimal_force=1
  CoordinateActuator T3_T4_LB: coordinate=T3_T4_LB optimal_force=1
  CoordinateActuator T3_T4_AR: coordinate=T3_T4_AR optimal_force=1
  CoordinateActuator T2_T3_FE: coordinate=T2_T3_FE optimal_force=1
  CoordinateActuator T2_T3_LB: coordinate=T2_T3_LB optimal_force=1
  CoordinateActuator T2_T3_AR: coordinate=T2_T3_AR optimal_force=1
  CoordinateActuator T1_T2_FE: coordinate=T1_T2_FE optimal_force=1
  CoordinateActuator T1_T2_LB: coordinate=T1_T2_LB optimal_force=1
  CoordinateActuator T1_T2_AR: coordinate=T1_T2_AR optimal_force=1
  CoordinateActuator T1_head_neck_FE: coordinate=T1_head_neck_FE optimal_force=1
  CoordinateActuator T1_head_neck_LB: coordinate=T1_head_neck_LB optimal_force=1
  CoordinateActuator T1_head_neck_AR: coordinate=T1_head_neck_AR optimal_force=1
  CoordinateActuator T12_r12R_X: coordinate=T12_r12R_X optimal_force=1
  CoordinateActuator T11_r11R_X: coordinate=T11_r11R_X optimal_force=1
  CoordinateActuator T10_r10R_X: coordinate=T10_r10R_X optimal_force=1
  CoordinateActuator T9_r9R_X: coordinate=T9_r9R_X optimal_force=1
  CoordinateActuator T8_r8R_X: coordinate=T8_r8R_X optimal_force=1
  CoordinateActuator T7_r7R_X: coordinate=T7_r7R_X optimal_force=1
  CoordinateActuator T6_r6R_X: coordinate=T6_r6R_X optimal_force=1
  CoordinateActuator T5_r5R_X: coordinate=T5_r5R_X optimal_force=1
  CoordinateActuator T4_r4R_X: coordinate=T4_r4R_X optimal_force=1
  CoordinateActuator T3_r3R_X: coordinate=T3_r3R_X optimal_force=1
  CoordinateActuator T2_r2R_X: coordinate=T2_r2R_X optimal_force=1
  CoordinateActuator T1_r1R_X: coordinate=T1_r1R_X optimal_force=1
  CoordinateActuator T12_r12L_X: coordinate=T12_r12L_X optimal_force=1
  CoordinateActuator T11_r11L_X: coordinate=T11_r11L_X optimal_force=1
  CoordinateActuator T10_r10L_X: coordinate=T10_r10L_X optimal_force=1
  CoordinateActuator T9_r9L_X: coordinate=T9_r9L_X optimal_force=1
  CoordinateActuator T8_r8L_X: coordinate=T8_r8L_X optimal_force=1
  CoordinateActuator T7_r7L_X: coordinate=T7_r7L_X optimal_force=1
  CoordinateActuator T6_r6L_X: coordinate=T6_r6L_X optimal_force=1
  CoordinateActuator T5_r5L_X: coordinate=T5_r5L_X optimal_force=1
  CoordinateActuator T4_r4L_X: coordinate=T4_r4L_X optimal_force=1
  CoordinateActuator T3_r3L_X: coordinate=T3_r3L_X optimal_force=1
  CoordinateActuator T2_r2L_X: coordinate=T2_r2L_X optimal_force=1
  CoordinateActuator T1_r1L_X: coordinate=T1_r1L_X optimal_force=1
  CoordinateActuator SternumRotZ: coordinate=SternumRotZ optimal_force=1
  CoordinateActuator SternumRotX: coordinate=SternumRotX optimal_force=1
  CoordinateActuator SternumRotY: coordinate=SternumRotY optimal_force=1
  CoordinateActuator shoulder_elv_r: coordinate=shoulder_elv_r optimal_force=1
  CoordinateActuator shoulder_rot_r: coordinate=shoulder_rot_r optimal_force=1
  CoordinateActuator elv_angle_r: coordinate=elv_angle_r optimal_force=1
  CoordinateActuator elbow_flexion_r: coordinate=elbow_flexion_r optimal_force=1
  CoordinateActuator pro_sup_r: coordinate=pro_sup_r optimal_force=1
  CoordinateActuator shoulder_elv_l: coordinate=shoulder_elv_l optimal_force=1
  CoordinateActuator shoulder_rot_l: coordinate=shoulder_rot_l optimal_force=1
  CoordinateActuator elv_angle_l: coordinate=elv_angle_l optimal_force=1
  CoordinateActuator elbow_flexion_l: coordinate=elbow_flexion_l optimal_force=1
  CoordinateActuator pro_sup_l: coordinate=pro_sup_l optimal_force=1
  CoordinateActuator hip_flexion_r: coordinate=hip_flexion_r optimal_force=1
  CoordinateActuator hip_adduction_r: coordinate=hip_adduction_r optimal_force=1
  CoordinateActuator hip_rotation_r: coordinate=hip_rotation_r optimal_force=1
  CoordinateActuator knee_angle_r: coordinate=knee_angle_r optimal_force=1
  CoordinateActuator ankle_angle_r: coordinate=ankle_angle_r optimal_force=1
  CoordinateActuator hip_flexion_l: coordinate=hip_flexion_l optimal_force=1
  CoordinateActuator hip_adduction_l: coordinate=hip_adduction_l optimal_force=1
  CoordinateActuator hip_rotation_l: coordinate=hip_rotation_l optimal_force=1
  CoordinateActuator knee_angle_l: coordinate=knee_angle_l optimal_force=1
  CoordinateActuator ankle_angle_l: coordinate=ankle_angle_l optimal_force=1
