# OpenSim document version 30000
AnalyzeTool NMB:
  model_file: C:\Users\hhuang10\Documents\Python\OpenSim-Spine-Project\Header_RunActivites\base\BaseFullbody_3DOF.osim
  replace_force_set: false
  output_precision: 8
  initial_time: 0
  final_time: 0
  solve_for_equilibrium_for_auxiliary_states: false
  maximum_number_of_integrator_steps: 20000
  maximum_integrator_step_size: 1
  minimum_integrator_step_size: 1e-8
  integrator_error_tolerance: 1e-5
  lowpass_cutoff_frequency_for_coordinates: -1
  AnalysisSet Analyses:
    JointReaction JointReaction_child: start_time=0 end_time=0 step_interval=1 in_degrees=true
        forces_file=NMB_StaticOptimization_force.sto joint_names=all apply_on_bodies=child express_in_frame=child
    JointReaction JointReaction_parent: start_time=0 end_time=0 step_interval=1 in_degrees=true
        forces_file=NMB_StaticOptimization_force.sto joint_names=all apply_on_bodies=parent express_in_frame=parent
    JointReaction JointReaction_child_ground: start_time=0 end_time=0 step_interval=1 in_degrees=true
        forces_file=NMB_StaticOptimization_force.sto joint_names=all apply_on_bodies=child express_in_frame=ground
    JointReaction JointReaction_parent_ground: start_time=0 end_time=0 step_interval=1 in_degrees=true
        forces_file=NMB_StaticOptimization_force.sto joint_names=all apply_on_bodies=parent express_in_frame=ground
    ForceReporter: start_time=0 end_time=0 step_interval=1 in_degrees=true include_constraint_forces=true
