# OpenSim document version 30000
ScaleTool Female50th-Scaled:
  mass: 35.87866 [kg]
  height: -1
  age: -1
  ModelScaler:
    apply: true
    scaling_order: manualScale
    time_range: -1 -1
    preserve_mass_distribution: true
    ScaleSet:
      Scale: scales=(1 1 1) segment=ground apply=true
      Scale: scales=(1 1 1) segment=sacrum apply=true
      Scale: scales=(1 1 1) segment=pelvis apply=true
      Scale: scales=(1 1 1) segment=Abdomen apply=true
      Scale: scales=(1 1 1) segment=lumbar5 apply=true
      Scale: scales=(1 1 1) segment=lumbar4 apply=true
      Scale: scales=(1 1 1) segment=lumbar3 apply=true
      Scale: scales=(1 1 1) segment=lumbar2 apply=true
      Scale: scales=(1 1 1) segment=lumbar1 apply=true
      Scale: scales=(1 1 1) segment=thoracic12 apply=true
      Scale: scales=(1 1 1) segment=thoracic11 apply=true
      Scale: scales=(1 1 1) segment=thoracic10 apply=true
      Scale: scales=(1 1 1) segment=thoracic9 apply=true
      Scale: scales=(1 1 1) segment=thoracic8 apply=true
      Scale: scales=(1 1 1) segment=thoracic7 apply=true
      Scale: scales=(1 1 1) segment=thoracic6 apply=true
      Scale: scales=(1 1 1) segment=thoracic5 apply=true
      Scale: scales=(1 1 1) segment=thoracic4 apply=true
      Scale: scales=(1 1 1) segment=thoracic3 apply=true
      Scale: scales=(1 1 1) segment=thoracic2 apply=true
      Scale: scales=(1 1 1) segment=thoracic1 apply=true
      Scale: scales=(1 1 1) segment=head_neck apply=true
      Scale: scales=(1 1 1) segment=rib12_R apply=true
      Scale: scales=(1 1 1) segment=rib11_R apply=true
      Scale: scales=(1 1 1) segment=rib10_R apply=true
      Scale: scales=(1 1 1) segment=rib9_R apply=true
      Scale: scales=(1 1 1) segment=rib8_R apply=true
      Scale: scales=(1 1 1) segment=rib7_R apply=true
      Scale: scales=(1 1 1) segment=rib6_R apply=true
      Scale: scales=(1 1 1) segment=rib5_R apply=true
      Scale: scales=(1 1 1) segment=rib4_R apply=true
      Scale: scales=(1 1 1) segment=rib3_R apply=true
      Scale: scales=(1 1 1) segment=rib2_R apply=true
      Scale: scales=(1 1 1) segment=rib1_R apply=true
      Scale: scales=(1 1 1) segment=rib12_L apply=true
      Scale: scales=(1 1 1) segment=rib11_L apply=true
      Scale: scales=(1 1 1) segment=rib10_L apply=true
      Scale: scales=(1 1 1) segment=rib9_L apply=true
      Scale: scales=(1 1 1) segment=rib8_L apply=true
      Scale: scales=(1 1 1) segment=rib7_L apply=true
      Scale: scales=(1 1 1) segment=rib6_L apply=true
      Scale: scales=(1 1 1) segment=rib5_L apply=true
      Scale: scales=(1 1 1) segment=rib4_L apply=true
      Scale: scales=(1 1 1) segment=rib3_L apply=true
      Scale: scales=(1 1 1) segment=rib2_L apply=true
      Scale: scales=(1 1 1) segment=rib1_L apply=true
      Scale: scales=(1 1 1) segment=sternum apply=true
      Scale: scales=(1 1 1) segment=clavicle_R apply=true
      Scale: scales=(1 1 1) segment=scapula_R apply=true
      Scale: scales=(1 1 1) segment=humerus_R apply=true
      Scale: scales=(1 1 1) segment=ulna_R apply=true
      Scale: scales=(1 1 1) segment=radius_R apply=true
      Scale: scales=(1 1 1) segment=hand_R apply=true
      Scale: scales=(1 1 1) segment=clavicle_L apply=true
      Scale: scales=(1 1 1) segment=scapula_L apply=true
      Scale: scales=(1 1 1) segment=humerus_L apply=true
      Scale: scales=(1 1 1) segment=ulna_L apply=true
      Scale: scales=(1 1 1) segment=radius_L apply=true
      Scale: scales=(1 1 1) segment=hand_L apply=true
      Scale: scales=(1 1 1) segment=Abd_L_L1 apply=true
      Scale: scales=(1 1 1) segment=Abd_L_L2 apply=true
      Scale: scales=(1 1 1) segment=Abd_L_L3 apply=true
      Scale: scales=(1 1 1) segment=Abd_L_L4 apply=true
      Scale: scales=(1 1 1) segment=Abd_L_L5 apply=true
      Scale: scales=(1 1 1) segment=Abd_R_L1 apply=true
      Scale: scales=(1 1 1) segment=Abd_R_L2 apply=true
      Scale: scales=(1 1 1) segment=Abd_R_L3 apply=true
      Scale: scales=(1 1 1) segment=Abd_R_L4 apply=true
      Scale: scales=(1 1 1) segment=Abd_R_L5 apply=true
      Scale: scales=(1 1 1) segment=Diaphragm apply=true
  MarkerPlacer:
    apply: true
    time_range: -1 -1
    max_marker_movement: -1
